1/(s*C)*(r + s*L)/(r + s*L + 1/(s*C)) == (r + s*L)/(1 + s*r*C + s^2*L*C)
f_mag(ω) := sqrt((r^2 + (ω*L)^2)/((1 - ω^2*L*C)^2 + (ω*r*C)^2))  # error: Эта переменная не определена.
f_mag(ω) := 10*log((r^2 + (ω*L)^2)/((1 - ω^2*L*C)^2 + (ω*r*C)^2))  # disabled
f_mag(ω) := 10*log(r^2 + (ω*L)^2) - 10*log((1 - ω^2*L*C)^2 + (ω*r*C)^2)  # error: Эта переменная не определена.
grad(ω) := [d/dL(f_mag(ω)); d/dr(f_mag(ω)); d/dC(f_mag(ω))]  # error: Эта переменная не определена.
grad(ω) simplify → [
    20*ω^2*(L - C*L^2*ω^2 + C*r^2)/(ln(10)*(L^2*ω^2 + r^2)*(C^2*L^2*ω^4 + C^2*ω^2*r^2 - 2*C*L*ω^2 + 1));
    (20*r - 40*C*L*ω^2*r)/((ln(10)*L^2*ω^2 + ln(10)*r^2)*(C^2*L^2*ω^4 + C^2*ω^2*r^2 - 2*C*L*ω^2 + 1));
    -20*ω^2*(C*L^2*ω^2 - L + C*r^2)/(ln(10)*(C^2*L^2*ω^4 + C^2*ω^2*r^2 - 2*C*L*ω^2 + 1))
]
grad_1(ω) := 20/ln(10)*1/((1 - C*L*ω^2)^2 + (ω*r*C)^2)*[
    1/(r^2 + (L*ω)^2)*L*ω^2*(1 - C*L*ω^2 + C/L*r^2);
    r/(r^2 + (L*ω)^2)*(1 - 2*C*L*ω^2);
    L*ω^2*(1 - C*L*ω^2 - C/L*r^2)
]  # error: Эта переменная не определена.
grad_1(ω) := 1/sqrt((r^2 + (ω*L)^2)/((1 - ω^2*L*C)^2 + (ω*r*C)^2))*1/((1 - ω^2*L*C)^2 + (ω*r*C)^2)^2*[ω^2*L*(1 - C*L*ω^2 + C/L*r^2); r*(1 - 2*C*L*ω^2); ω^2*L*(r^2 + (ω*L)^2)*(1 - C*L*ω^2 - C/L*r^2)]  # disabled
grad(ω)[0]/grad_1(ω)[0] simplify → 1
grad(ω)[1]/grad_1(ω)[1] simplify → 1
grad(ω)[2]/grad_1(ω)[2] simplify → 1
